// COMSOL Multiphysics 5.1.0.234 model "draft.mph"
// Outline of the model tree
// Components: comp1 "model 2D", comp2 "model 1D"
// Unit system: none

Parameters
  a_br = 2
  k_br = 2.16e-5
  a_gr = 2
  k_gr = 8.7
  Dm = 8.4
  beta = 0.8
  Dc = 10
  k_s = 0.5
  l = 0.003
  alpha = 0.2

Functions
  an1: Analytic | expr = x; args = x
  step1: Step | location = 0.5; smooth = 0.5

Variables
  var1 "Variables" [comp1]
    v_p = a_br*k_on_br*r_p*r_m^2 + a_gr*k_on_gr*r_m*r_p
  var2 "Variables 2" [comp2] on domains 1
    v = a_br*k_br*x_zero(p)*x_zero(m)^2 + a_gr*k_gr*x_zero(m)*x_zero(p)
    alpha_test = step1(c_b)

Couplings
  genext1: GeneralExtrusion "Coupling" on boundaries 1 | opname = x_zero; dstmap = 0; srcframe = spatial

Geometry
  geom1 "Geometry 1" [comp1] (2D, length unit m)
    fin: Finalize "Form Union"
  geom2 "Geometry 2" [comp2] (1D, length unit m)
    i1: Interval | intervals = one; p1 = 0; p2 = 1; p = {0, 1}
    fin: Finalize "Form Union"

Physics
  g: GeneralFormPDE [geom1] on all domains
    dependent variable rho = {r_p, r_m, r_sf, r_sb}
    Units.SourceTermQuantity = dimensionless
    Units.CustomSourceTermUnit = 1
    gfeq1: GeneralFormPDE (default)
      f = {-alpha*r_p*r_sb + v_p*r_py, alpha*r_p*r_sb, -k_on_s*r_sf*r_p + alpha*r_p*r_sb, k_on_s*r_sf*r_p +v_p*r_sby - alpha*r_sb*r_p}
      Ga = {{0, 0}, {-Dm*(1-beta*r_p)*r_mx, -Dm*(1-beta*r_p)*r_my}, {-Ds*r_sfx, -Ds*r_sfy}, {0, 0}}
      da = {1, 0, 0, 0, 0, 1, 0, 0, 0, 0, 1, 0, 0, 0, 0, 1}
    zflx1: ZeroFluxBoundary "Zero Flux 1" (default)
    init1: init "Initial Values 1" (default) | r_p = 0.1; r_pt = 0; r_m = 10; r_sb = 0; r_sf = 5
    flux1: FluxBoundary "Flux/Source 1" on no boundaries | g = {0, -k_on_br*r_p*r_m^2 - k_on_gr*r_m*r_p, 0, 0}
    dir1: DirichletBoundary "Dirichlet Boundary Condition 1" on no boundaries
      r = {(k_on_br*r_m^2 + k_on_gr*r_m)/(a_br*k_on_br*r_m^2 + a_gr*k_on_gr*r_m), 0, 0, 0}
      useDirichletCondition = {1, 0, 0, 1}
    pc1: PeriodicCondition on no boundaries
  g2: GeneralFormPDE "model 1D" [geom2] on all domains
    dependent variable u = {p, m, c_f, c_b}
    gfeq1: GeneralFormPDE (default)
      f = {v*px -alpha*p*c_b, alpha*p*c_b, -k_s*c_f*p + alpha*p*c_b, v*c_bx + k_s*c_f*p -alpha*p*c_b}
      Ga = {0, -Dm*(1-beta*p)*mx, -Dc*c_fx, 0}
      da = {1, 0, 0, 0, 0, 1, 0, 0, 0, 0, 1, 0, 0, 0, 0, 1}
    zflx1: ZeroFluxBoundary "Zero Flux 1" (default)
    init1: init "Initial Values 1" (default) | p = 0.2; m = 0.5*exp(-t); c_f = 2; c_b = 0.2
    flux1: FluxBoundary "Flux/Source 1" on boundaries 1 | g = {0, - k_br*p*m^2 - k_gr*m*p, 0, 0}
    dir1: DirichletBoundary "Dirichlet Boundary Condition 1" on boundaries 1
      r = {l*(k_br*m^2 + k_gr*m)/(a_br*k_br*m^2 + a_gr*k_gr*m), 0, 0, 0}
      useDirichletCondition = {1, 0, 0, 1}

Mesh
  mesh2 "Mesh 2" [geom2] (physics-controlled)
    size: MeshSizeDefault | hauto = 3

Studies
  std1 "Study 1"
    time: Transient "Time Dependent" | tlist = range(0,0.1,10); physselection = g; solve for = {g2}

Solver configurations
  sol1 "Solution 1" (study std1)
    v1: Variables "Dependent Variables 1"
    t1: Time "Time-Dependent Solver 1" | tlist = range(0,0.1,10)
      dDef: Direct
      fc1: FullyCoupled | linsolver = dDef

Datasets
  dset1: Solution | solution = sol1
  dset2: Solution | solution = sol1

Derived values
  int1: IntLine "Line Integration 1" on all domains | data = dset2; table = new; expr = p+m
  int2: IntLine "Line Integration 2" on all domains | data = dset2; table = tbl1; expr = c_f + c_b

Tables
  tbl1: Table
    // Line Integration 2 (c_f + c_b)
    Time | c_f + c_b
    0 | 2.19913
    0.1 | 2.19926
    0.2 | 2.19938
    0.3 | 2.19951
    0.4 | 2.19962
    0.5 | 2.19972
    0.6 | 2.19983
    0.7 | 2.19992
    0.8 | 2.2
    0.9 | 2.20008
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
Plots
  pg1: PlotGroup1D "m and p"
    data = dset2
    title = Polymer (p) and monomer (m) concentration
    xlabel = x
    animating = off
    lngr1: LineGraph on all domains | expr = m; xdata = expr; xdataexpr = x; legends = m(x)
    lngr2: LineGraph on domains 1 | expr = p; legends = p(x)
  pg2: PlotGroup1D "c's"
    data = dset2
    title = Bound (c_b) and free (c_f) Cofilin concentration
    xlabel = x
    animating = off
    lngr1: LineGraph on all domains | expr = c_f; xdata = expr; xdataexpr = x; legends = c_f(x)
    lngr2: LineGraph on domains 1 | expr = c_b; legends = c_b(x)
  pg3: PlotGroup1D "v" | data = dset2; title = Polymerization velocity v(t)
    ptgr1: PointGraph on boundaries 2 | expr = v; legends = v(t)
  pg4: PlotGroup1D "m and p int" | data = dset2; title = Spatial integral of (p+m) vs time
  pg5: PlotGroup1D "1D Plot Group 5" | data = none
    tblp1: Table "Table Graph 1" | table = tbl1

Exports
  anim1: Animation "m and p" | target = file; giffilename = m and p; framesel = all; onlydisplay = off; options = on
  anim2: Animation "c's" | target = file; giffilename = cofilin; framesel = all; onlydisplay = off; options = on