// COMSOL Multiphysics 5.1.0.234 model "heat_equation.mph"
// Outline of the model tree

Geometry
  geom1 "Geometry 1" (2D, length unit m)
    r1: Rectangle | pos = {-0.85, -0.05}; type = solid; base = corner; size = {1.7, 0.1}
    b1: BezierPolygon "Bézier Polygon 1"
      p = {{-0.2, -0.2, 0.2, 0.2, -0.2}, {0.1, -0.15, -0.15, 0.1, 0.1}}
      degree = {1, 1, 1, 1}
      w = {1, 1, 1, 1, 1, 1, 1, 1}
      type = solid
    par1: Partition "Partition Objects 1" | input = r1; tool = b1
    fin: Finalize "Form Union"

Physics
  g: GeneralFormPDE on all domains
    dependent variable T
    gfeq1: GeneralFormPDE (default) | f = 0; Ga = {-Tx, -Ty}; da = 1
    zflx1: ZeroFluxBoundary "Zero Flux 1" (default)
    init1: init "Initial Values 1" (default) | T = -297; Tt = 0
    init2: init "Initial Values 2" on domains 2 | T = 30
    flux1: FluxBoundary "Flux/Source 1" on boundaries 1 | g = 100

Mesh
  mesh1 "Mesh 1" (physics-controlled)
    size: MeshSizeDefault | hauto = 3

Studies
  std1 "Study 1"
    time: Transient "Time Dependent" | tlist = range(0,0.01,2)

Solver configurations
  sol1 "Solution 1" (study std1)
    v1: Variables "Dependent Variables 1"
    t1: Time "Time-Dependent Solver 1" | tlist = range(0,0.01,2)
      dDef: Direct
      fc1: FullyCoupled | linsolver = dDef

Datasets
  dset1: Solution | solution = sol1

Plots
  pg1: PlotGroup2D "2D Plot Group 1" | data = dset1
    surf1: Surface | expr = T