// COMSOL Multiphysics 5.1.0.234 model "wave eq and coupling.mph"
// Outline of the model tree
// Unit system: none

Variables
  var1 "Variables 1"
    a = couple(u)

Couplings
  genext1: GeneralExtrusion on boundaries 1 | opname = couple; dstmap = 0; usesrcmap = off

Geometry
  geom1 "Geometry 1" (1D, length unit m)
    i1: Interval | p = 0, 1
    fin: Finalize "Form Union"

Physics
  g: GeneralFormPDE on all domains
    dependent variable u = {u, y}
    gfeq1: GeneralFormPDE (default) | f = {0, y - a}; Ga = {-(1+0.5)*ux, 0}; da = {0, 0, 0, 0}; ea = {1, 0, 0, 0}
    zflx1: ZeroFluxBoundary "Zero Flux 1" (default)
    init1: init "Initial Values 1" (default) | u = 2; ut = 0; y = 1
    dir2: DirichletBoundary "Dirichlet Boundary Condition 2" on boundaries 2 | r = {0, 5}; useDirichletCondition = {1, 0}

Mesh
  mesh1 "Mesh 1" (physics-controlled)
    size: MeshSizeDefault | hauto = 3

Studies
  std1 "Study 1"
    time: Transient "Time Dependent" | tlist = range(0,0.01,5)

Solver configurations
  sol1 "Solution 1" (study std1)
    v1: Variables "Dependent Variables 1"
    t1: Time "Time-Dependent Solver 1" | tlist = range(0,0.01,5)
      dDef: Direct
      fc1: FullyCoupled | linsolver = dDef

Datasets
  dset1: Solution | solution = sol1

Plots
  pg1: PlotGroup1D "u plot" | data = dset1; animating = off
  pg2: PlotGroup1D "y plot" | data = dset1; animating = off
    lngr1: LineGraph on domains 1 | expr = y
    lngr2: LineGraph on all domains | expr = u

Exports
  anim1: Animation | target = player; framesel = all; maxframes = 501; autoplay = off; onlydisplay = off